alfa := 6.7016
zeta := 74.493
alfa_rad := alfa*π/180 = 0.116965
zeta_rad := zeta*π/180 = 1.30015
aXZ := 171.5
beta := 105.507
Rzxy := 17.5
beta_rad := beta*π/180 = 1.84144
Lzxy := 539.85
gamma := 57.067
dxz := 448.84
gamma_rad := gamma*π/180 = 0.996007
q := sqrt(aXZ*aXZ + Rzxy*Rzxy) = 172.391
tetaC := aXZ/q = 0.994834
teta_rad := acos(tetaC) = 0.101689
teta := teta_rad*180/π = 5.82634
betaN := beta + teta = 111.333
betaN_rad := betaN*π/180 = 1.94313
Cxyz_1 := Lzxy*cos(alfa_rad) = 536.161
Cxyz_2 := Cxyz_1*sin(gamma_rad) = 450.004
Cxyz_3 := dxz*sin(zeta_rad) = 432.501
gammaC := 291.5/536.1644 = 0.543677
gamma_rad := acos(gammaC) = 0.995985
gamma := gamma_rad*180/π = 57.0657
